*Heading
** Job name: HexagonalMode1PLA_HT_PATTERN Model name: HexagonalMode1PLA_HT_PATTERN
** Generated by: Abaqus/CAE 2017
*Preprint, echo=NO, model=NO, history=NO, contact=NO
**
** PARTS
**
*Part, name=PLA
*Node
      1,   5.56491184,   3.09197688
      2,   4.69888639,   3.59197688
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*Element, type=CPE4
   1,    1,   26,  779,   37
   2,   26,   27,  780,  779
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*Element, type=CPE3
1873, 2147,  764,  125
1874,  764,   10,  125
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*Elset, elset=Set-1, generate
    1,  1938,     1
** Section: Section-1
*Solid Section, elset=Set-1, material=PLA
2.,
*End Part
**
**
** ASSEMBLY
**
*Assembly, name=Assembly
**
*Instance, name=PLA-1, part=PLA
  -14.216386,    -20.07677,           0.
*End Instance
**
*Nset, nset=POINT1, instance=PLA-1
 7,
*Nset, nset=POINT1LINE, instance=PLA-1
   8,  14,  44,  45,  46, 211, 212, 213
*Nset, nset=POINT1PART, instance=PLA-1
  6, 41, 42, 43
*Nset, nset=POINT2, instance=PLA-1
 24,
*Nset, nset=POINT2LINE, instance=PLA-1
  18,  19,  24, 445, 446, 447, 685, 686, 687
*Elset, elset=POINT2LINE, instance=PLA-1
  956,  960,  964,  968, 1573, 1574, 1575, 1576
*Nset, nset=POINT2PART, instance=PLA-1
  23,  24, 682, 683, 684
*Elset, elset=POINT2PART, instance=PLA-1, generate
 1564,  1576,     4
*Nset, nset=POINT3, instance=PLA-1
 12,
*Nset, nset=POINT3LINE, instance=PLA-1
   3,   4,  12,  32,  33,  34, 205, 206, 207
*Elset, elset=POINT3LINE, instance=PLA-1
  13,  14,  15,  16, 341, 342, 343, 344
*Nset, nset=POINT3PART, instance=PLA-1
  11,  12, 202, 203, 204
*Elset, elset=POINT3PART, instance=PLA-1, generate
 332,  344,    4
*Nset, nset=Set-12, instance=PLA-1
 25,
*Nset, nset=Set-13, instance=PLA-1, generate
    1,  2152,     1
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*Nset, nset="_T-Transform__T-Datum csys-3", internal
POINT3PART,
POINT3LINE,
*Transform, nset="_T-Transform__T-Datum csys-3"
-0.499999989702907, -0.866025409729468,           0., -0.866025409729468, 0.499999989702907,           0.
*Nset, nset="_T-Transform__T-Datum csys-2", internal
POINT2PART,
POINT2LINE,
*Transform, nset="_T-Transform__T-Datum csys-2"
-0.499999899426162, 0.866025461850763,           0., 0.866025461850763, 0.499999899426162,           0.
** Constraint: Eqn-1
*Equation
2
POINT3PART, 2, 1.
POINT1, 2, 1.
** Constraint: Eqn-2
*Equation
2
POINT2PART, 2, 1.
POINT1, 2, 1.
** Constraint: Eqn-3
*Equation
2
POINT1PART, 2, 1.
POINT1, 2, -1.
** Constraint: Eqn-4
*Equation
2
POINT3LINE, 1, 1.
POINT1, 1, -1.
** Constraint: Eqn-5
*Equation
2
POINT2LINE, 1, 1.
POINT1, 1, -1.
** Constraint: Eqn-6
*Equation
2
POINT1LINE, 1, 1.
POINT1, 1, -1.
*End Assembly
**
** MATERIALS
**
*Material, name=PLA
*Elastic, moduli=INSTANTANEOUS
1649., 0.32
*Viscoelastic, time=PRONY
    0.182941,      0., 0.00048
    0.393863,      0.,  0.0048
    0.373335,      0.,   0.048
   0.0355913,      0.,    0.48
  0.00822923,      0.,     4.8
  0.00309885,      0.,     48.
 0.000915706,      0.,    480.
 0.000800485,      0.,   4800.
 0.000394178,      0.,  48000.
 0.000200121,      0., 480000.
*Trs
 60.12,   548.8, 2434.99
**
** BOUNDARY CONDITIONS
**
** Name: middle Type: Displacement/Rotation
*Boundary
Set-12, 1, 1
Set-12, 2, 2
** Name: point1 Type: Displacement/Rotation
*Boundary
POINT1, 1, 1
POINT1, 2, 2
**
** PREDEFINED FIELDS
**
** Name: Predefined Field-1   Type: Temperature
*Initial Conditions, type=TEMPERATURE
Set-13, 80.
** ----------------------------------------------------------------
**
** STEP: assemble
**
*Step, name=assemble, nlgeom=YES
*Visco
1., 100.,
**
** BOUNDARY CONDITIONS
**
** Name: point1 Type: Displacement/Rotation
*Boundary
POINT1, 1, 1, -0.0644
POINT1, 2, 2, 2.76
**
** OUTPUT REQUESTS
**
*Restart, write, frequency=0
**
** FIELD OUTPUT: F-Output-1
**
*Output, field, variable=PRESELECT
**
** HISTORY OUTPUT: H-Output-1
**
*Output, history
*Energy Output
ALLSE,
**
** HISTORY OUTPUT: H-Output-2
**
*Node Output, nset=POINT1
U1, U2
**
** HISTORY OUTPUT: H-Output-3
**
*Output, history, variable=PRESELECT
*End Step
