*Heading
** Job name: HexagonalMode1TPU_HT_PATTERN Model name: HexagonalMode1TPU_HT_PATTERN
** Generated by: Abaqus/CAE 2017
*Preprint, echo=NO, model=NO, history=NO, contact=NO
**
** PARTS
**
*Part, name=TPU
*Node
      1,   26.8169327,  -1.21589398
      2,   33.1263771,   12.9675398
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*Element, type=CPE4
  1,    1,   38,  893,  165
  2,   38,   39,  894,  893
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*Element, type=CPE3
1435, 1853,  776,  777
1436,  779,    3,  101
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*Nset, nset=Set-1, generate
    1,  2242,     1
*Elset, elset=Set-1, generate
    1,  2412,     1
** Section: TPU
*Solid Section, elset=Set-1, material=TPU
5.,
*End Part
**
**
** ASSEMBLY
**
*Assembly, name=Assembly
**
*Instance, name=TPU-1, part=TPU
  -33.363867,   -13.493783,           0.
*End Instance
**
*Nset, nset=Set-11, instance=TPU-1
 30,
*Nset, nset=Set-12, instance=TPU-1
 34,
*Nset, nset=Set-13, instance=TPU-1
 24,
*Nset, nset=Set-14, instance=TPU-1
 18,
*Nset, nset=Set-15, instance=TPU-1, generate
    1,  2242,     1
*Elset, elset=Set-15, instance=TPU-1, generate
    1,  2412,     1
*Nset, nset=middle, instance=TPU-1
 34,
*Nset, nset=point1, instance=TPU-1
 30,
*Nset, nset=point1line, instance=TPU-1
  29, 727, 728, 729, 730, 731
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*Nset, nset=point1part, instance=TPU-1
  33, 751, 752, 753
*Nset, nset=point2, instance=TPU-1
 24,
*Nset, nset=point2line, instance=TPU-1
  23,  24, 675, 676, 677, 678
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*Nset, nset=point2part, instance=TPU-1
  24,  27, 699, 700, 701
*Nset, nset=point3, instance=TPU-1
 18,
*Nset, nset=point3line, instance=TPU-1
  17,  18, 623, 624, 625, 626
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*Nset, nset=point3part, instance=TPU-1
  18,  21, 647, 648, 649
*Nset, nset="_T-Datum csys-2", internal
point2line,
point2part,
*Transform, nset="_T-Datum csys-2"
-0.499999868285953, 0.866025479829566,           0., 0.866025479829566, 0.499999868285953,           0.
*Nset, nset="_T-Datum csys-3", internal
point3line,
point3part,
*Transform, nset="_T-Datum csys-3"
-0.500000217950969, -0.866025277950351,           0., -0.866025277950351, 0.500000217950969,           0.
** Constraint: point1line
*Equation
2
point1line, 1, 1.
point1, 1, -1.
** Constraint: point1part
*Equation
2
point1part, 2, 1.
point1, 2, -1.
** Constraint: point2line
*Equation
2
point2line, 1, 1.
point1, 1, -1.
** Constraint: point2part
*Equation
2
point2part, 2, 1.
point1, 2, 1.
** Constraint: point3line
*Equation
2
point3line, 1, 1.
point1, 1, -1.
** Constraint: point3part
*Equation
2
point3part, 2, 1.
point1, 2, 1.
*End Assembly
**
** MATERIALS
**
*Material, name=TPU
*Elastic
 95.4141,   0.32, 18.017
 95.0917,   0.32,  18.14
 94.6418,   0.32, 18.301
 94.1044,   0.32, 18.478
 93.5199,   0.32, 18.639
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 25.6031,   0.32,   81.9
**
** BOUNDARY CONDITIONS
**
** Name: middle Type: Displacement/Rotation
*Boundary
Set-12, 1, 1
Set-12, 2, 2
** Name: point1 Type: Displacement/Rotation
*Boundary
Set-11, 1, 1
Set-11, 2, 2
**
** PREDEFINED FIELDS
**
** Name: TEMPERATURE   Type: Temperature
*Initial Conditions, type=TEMPERATURE
Set-15, 80.
** ----------------------------------------------------------------
**
** STEP: ASSEMBLE
**
*Step, name=ASSEMBLE, nlgeom=YES
*Static, direct
0.01, 1.,
**
** BOUNDARY CONDITIONS
**
** Name: point1 Type: Displacement/Rotation
*Boundary
Set-11, 1, 1, 0.0056
Set-11, 2, 2, -0.24
**
** OUTPUT REQUESTS
**
*Restart, write, frequency=0
**
** FIELD OUTPUT: F-Output-1
**
*Output, field, variable=PRESELECT
**
** HISTORY OUTPUT: H-Output-3
**
*Output, history
*Energy Output
ALLSE,
**
** HISTORY OUTPUT: H-Output-2
**
*Node Output, nset=point1
U1, U2
**
** HISTORY OUTPUT: H-Output-1
**
*Output, history, variable=PRESELECT
*End Step
