*Heading
** Job name: SquareMode1TPU_LT_PATTERN Model name: SquareMode1TPU_LT_PATTERN
** Generated by: Abaqus/CAE 2017
*Preprint, echo=NO, model=NO, history=NO, contact=NO
**
** PARTS
**
*Part, name=TPU
*Node
      1,   25.3365631,   9.33759403
      2,   26.8390446,   24.3624077
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*Element, type=CPE4
  1,    1,   50, 1154,  173
  2,   50,   51, 1155, 1154
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*Element, type=CPE3
1901,   12, 1018, 2418
1902, 2418,  420,   12
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*Nset, nset=Set-1, generate
    1,  2929,     1
*Elset, elset=Set-1, generate
    1,  3124,     1
** Section: TPU
*Solid Section, elset=Set-1, material=TPU
5.,
*End Part
**
**
** ASSEMBLY
**
*Assembly, name=Assembly
**
*Instance, name=TPU-1, part=TPU
  -26.938549,   -25.357445,           0.
*End Instance
**
*Nset, nset=Set-1, instance=TPU-1
 13,
*Nset, nset=Set-2, instance=TPU-1
  22,  23, 810, 811, 812
*Elset, elset=Set-2, instance=TPU-1, generate
 1492,  1495,     1
*Nset, nset=Set-3, instance=TPU-1
  40,  41, 966, 967, 968
*Elset, elset=Set-3, instance=TPU-1, generate
 1792,  1795,     1
*Nset, nset=Set-4, instance=TPU-1
  34,  35, 914, 915, 916
*Elset, elset=Set-4, instance=TPU-1, generate
 1692,  1695,     1
*Nset, nset=Set-5, instance=TPU-1
  28,  29, 862, 863, 864
*Elset, elset=Set-5, instance=TPU-1, generate
 1592,  1595,     1
*Nset, nset=Set-6, instance=TPU-1, generate
    1,  2929,     1
*Elset, elset=Set-6, instance=TPU-1, generate
    1,  3124,     1
*Nset, nset=bottom, instance=TPU-1
 29,
*Nset, nset=bottomline, instance=TPU-1
  30, 865, 866, 867, 868, 869
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*Nset, nset=bottompart, instance=TPU-1
  28, 862, 863, 864
*Nset, nset=left, instance=TPU-1
 35,
*Nset, nset=leftline, instance=TPU-1
  36, 917, 918, 919, 920, 921
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*Nset, nset=leftpart, instance=TPU-1
  34, 914, 915, 916
*Nset, nset=right, instance=TPU-1
 23,
*Nset, nset=rightline, instance=TPU-1
  24, 813, 814, 815, 816, 817
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*Nset, nset=rightpart, instance=TPU-1
  22, 810, 811, 812
*Nset, nset=top, instance=TPU-1
 41,
*Nset, nset=topline, instance=TPU-1
  42, 969, 970, 971, 972, 973
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*Nset, nset=toppart, instance=TPU-1
  40, 966, 967, 968
** Constraint: Constraint-1
*Equation
2
bottomline, 2, 1.
bottom, 2, -1.
** Constraint: Constraint-2
*Equation
2
leftline, 1, 1.
left, 1, -1.
** Constraint: Constraint-3
*Equation
2
rightline, 1, 1.
right, 1, -1.
** Constraint: Constraint-4
*Equation
2
topline, 2, 1.
top, 2, -1.
** Constraint: Constraint-5
*Equation
2
bottompart, 1, 1.
bottom, 1, -1.
** Constraint: Constraint-6
*Equation
2
leftpart, 2, 1.
left, 2, -1.
** Constraint: Constraint-7
*Equation
2
rightpart, 2, 1.
right, 2, -1.
** Constraint: Constraint-8
*Equation
2
toppart, 2, 1.
top, 2, -1.
** Constraint: Constraint-9
*Equation
2
left, 1, 1.
right, 1, 1.
** Constraint: Constraint-10
*Equation
2
left, 2, 1.
right, 2, 1.
** Constraint: Constraint-11
*Equation
2
top, 2, 1.
right, 1, -1.
** Constraint: Constraint-12
*Equation
2
top, 1, 1.
right, 2, 1.
** Constraint: Constraint-13
*Equation
2
bottom, 2, 1.
right, 1, 1.
** Constraint: Constraint-14
*Equation
2
bottom, 1, -1.
right, 2, 1.
*End Assembly
**
** MATERIALS
**
*Material, name=TPU
*Elastic
 95.4141,   0.32, 18.017
 95.0917,   0.32,  18.14
 94.6418,   0.32, 18.301
 94.1044,   0.32, 18.478
 93.5199,   0.32, 18.639
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 25.6031,   0.32,   81.9
**
** BOUNDARY CONDITIONS
**
** Name: middle Type: Displacement/Rotation
*Boundary
Set-1, 1, 1
Set-1, 2, 2
** Name: right Type: Displacement/Rotation
*Boundary
right, 1, 1
right, 2, 2
**
** PREDEFINED FIELDS
**
** Name: Predefined Field-1   Type: Temperature
*Initial Conditions, type=TEMPERATURE
Set-6, 20.
** ----------------------------------------------------------------
**
** STEP: assemble
**
*Step, name=assemble, nlgeom=YES
*Static, direct
0.01, 1.,
**
** BOUNDARY CONDITIONS
**
** Name: right Type: Displacement/Rotation
*Boundary
right, 1, 1, 0.0553
right, 2, 2, 2.37
**
** OUTPUT REQUESTS
**
*Restart, write, frequency=1
**
** FIELD OUTPUT: F-Output-1
**
*Output, field, variable=PRESELECT
**
** HISTORY OUTPUT: H-Output-4
**
*Output, history
*Energy Output
ALLSE,
**
** HISTORY OUTPUT: H-Output-2
**
*Node Output, nset=right
RF1, RF2, U1, U2
**
** HISTORY OUTPUT: H-Output-1
**
*Output, history, variable=PRESELECT
*End Step
