*Heading
** Job name: SquareMode2TPU_HT_PATTERN Model name: SquareMode2TPU_HT_PATTERN
** Generated by: Abaqus/CAE 2017
*Preprint, echo=NO, model=NO, history=NO, contact=NO
**
** PARTS
**
*Part, name=TPU
*Node
      1,   41.8061562,   20.4759445
      2,   35.7863083,   21.0779305
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*Element, type=CPE4
 1,    1,   94, 1238,  145
 2,   94,   95, 1239, 1238
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*Element, type=CPE3
1813,   32,  479, 2438
1814, 2438,  999,   32
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*Nset, nset=Set-1, generate
    1,  3461,     1
*Elset, elset=Set-1, generate
    1,  4260,     1
** Section: TPU
*Solid Section, elset=Set-1, material=TPU
5.,
*End Part
**
**
** ASSEMBLY
**
*Assembly, name=Assembly
**
*Instance, name=TPU-1, part=TPU
  -21.806158,   -20.475945,           0.
*End Instance
**
*Nset, nset=Set-1, instance=TPU-1
 67,
*Nset, nset=Set-2, instance=TPU-1
 14,
*Nset, nset=Set-3, instance=TPU-1
 1,
*Nset, nset=Set-4, instance=TPU-1
 29,
*Nset, nset=Set-5, instance=TPU-1
 17,
*Nset, nset=Set-18, instance=TPU-1
 1,
*Nset, nset=Set-19, instance=TPU-1
 52,
*Nset, nset=Set-20, instance=TPU-1, generate
    1,  3461,     1
*Elset, elset=Set-20, instance=TPU-1, generate
    1,  4260,     1
*Nset, nset=bottom, instance=TPU-1
 58,
*Nset, nset=bottompart, instance=TPU-1
  57,  71, 774, 775, 776, 849, 850, 851
*Nset, nset=farbottom, instance=TPU-1
 17,
*Nset, nset=farleft, instance=TPU-1
 14,
*Nset, nset=farright, instance=TPU-1
 1,
*Nset, nset=fartop, instance=TPU-1
 29,
*Nset, nset=left, instance=TPU-1
 73,
*Nset, nset=leftpart, instance=TPU-1
  72,  85, 870, 871, 872, 945, 946, 947
*Nset, nset=m_Set-21, instance=TPU-1
 1,
*Nset, nset=m_Set-22, instance=TPU-1
 14,
*Nset, nset=m_Set-23, instance=TPU-1
 29,
*Nset, nset=m_Set-24, instance=TPU-1
 17,
*Nset, nset=right, instance=TPU-1
 52,
*Nset, nset=rightpart, instance=TPU-1
  51,  66, 730, 731, 732, 821, 822, 823
*Nset, nset=top, instance=TPU-1
 46,
*Nset, nset=toppart, instance=TPU-1
  45,  81, 686, 687, 688, 917, 918, 919
*Elset, elset=_s_Surf-1_S4, internal, instance=TPU-1, generate
  1,  51,  25
*Elset, elset=_s_Surf-1_S2, internal, instance=TPU-1, generate
 916,  966,   25
*Surface, type=ELEMENT, name=s_Surf-1
_s_Surf-1_S4, S4
_s_Surf-1_S2, S2
*Elset, elset=_s_Surf-2_S2, internal, instance=TPU-1, generate
 226,  276,   25
*Elset, elset=_s_Surf-2_S4, internal, instance=TPU-1, generate
 754,  804,   25
*Surface, type=ELEMENT, name=s_Surf-2
_s_Surf-2_S2, S2
_s_Surf-2_S4, S4
*Elset, elset=_s_Surf-3_S2, internal, instance=TPU-1, generate
 502,  552,   25
*Elset, elset=_s_Surf-3_S4, internal, instance=TPU-1, generate
 1030,  1080,    25
*Surface, type=ELEMENT, name=s_Surf-3
_s_Surf-3_S2, S2
_s_Surf-3_S4, S4
*Elset, elset=_s_Surf-4_S4, internal, instance=TPU-1, generate
 277,  327,   25
*Elset, elset=_s_Surf-4_S2, internal, instance=TPU-1, generate
 640,  690,   25
*Surface, type=ELEMENT, name=s_Surf-4
_s_Surf-4_S4, S4
_s_Surf-4_S2, S2
** Constraint: bottom
*Equation
2
bottompart, 1, 1.
bottom, 1, -1.
** Constraint: bottom-right
*Equation
2
bottom, 2, 1.
right, 1, 1.
** Constraint: bottom-right2
*Equation
2
bottom, 1, 1.
right, 2, -1.
** Constraint: coupling-bottom
*Coupling, constraint name=coupling-bottom, ref node=m_Set-24, surface=s_Surf-4
*Kinematic
** Constraint: coupling-left
*Coupling, constraint name=coupling-left, ref node=m_Set-22, surface=s_Surf-2
*Kinematic
** Constraint: coupling-right
*Coupling, constraint name=coupling-right, ref node=m_Set-21, surface=s_Surf-1
*Kinematic
** Constraint: coupling-top
*Coupling, constraint name=coupling-top, ref node=m_Set-23, surface=s_Surf-3
*Kinematic
** Constraint: farbottom-right
*Equation
2
farbottom, 2, 1.
farright, 1, 1.
** Constraint: farleft-right
*Equation
2
farleft, 1, 1.
farright, 1, 1.
** Constraint: fartop-right
*Equation
2
fartop, 2, 1.
farright, 1, -1.
** Constraint: left
*Equation
2
leftpart, 2, 1.
left, 2, -1.
** Constraint: left-right
*Equation
2
left, 1, 1.
right, 1, 1.
** Constraint: left-right2
*Equation
2
left, 2, 1.
right, 2, 1.
** Constraint: right
*Equation
2
rightpart, 2, 1.
right, 2, -1.
** Constraint: top
*Equation
2
toppart, 1, 1.
top, 1, -1.
** Constraint: top-right
*Equation
2
top, 2, 1.
right, 1, -1.
** Constraint: top-right2
*Equation
2
top, 1, 1.
right, 2, 1.
*End Assembly
**
** MATERIALS
**
*Material, name=TPU
*Elastic
 95.4141,   0.32, 18.017
 95.0917,   0.32,  18.14
 94.6418,   0.32, 18.301
 94.1044,   0.32, 18.478
 93.5199,   0.32, 18.639
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 25.6031,   0.32,   81.9
**
** BOUNDARY CONDITIONS
**
** Name: farright Type: Displacement/Rotation
*Boundary
Set-18, 1, 1
** Name: fixedbottom Type: Displacement/Rotation
*Boundary
Set-5, 1, 1
** Name: fixedleft Type: Displacement/Rotation
*Boundary
Set-2, 2, 2
** Name: fixedright Type: Displacement/Rotation
*Boundary
Set-3, 2, 2
** Name: fixedtop Type: Displacement/Rotation
*Boundary
Set-4, 1, 1
** Name: middle Type: Displacement/Rotation
*Boundary
Set-1, 1, 1
Set-1, 2, 2
** Name: right Type: Displacement/Rotation
*Boundary
Set-19, 1, 1
Set-19, 2, 2
**
** PREDEFINED FIELDS
**
** Name: Temperature   Type: Temperature
*Initial Conditions, type=TEMPERATURE
Set-20, 80.
** ----------------------------------------------------------------
**
** STEP: assemble
**
*Step, name=assemble, nlgeom=YES
*Static, direct
0.01, 1.,
**
** BOUNDARY CONDITIONS
**
** Name: farright Type: Displacement/Rotation
*Boundary
Set-18, 1, 1, -0.0035
** Name: right Type: Displacement/Rotation
*Boundary
Set-19, 1, 1, -0.00175
Set-19, 2, 2, -0.14
**
** OUTPUT REQUESTS
**
*Restart, write, frequency=0
**
** FIELD OUTPUT: F-Output-1
**
*Output, field, variable=PRESELECT
**
** HISTORY OUTPUT: H-Output-3
**
*Output, history
*Energy Output
ALLSE,
**
** HISTORY OUTPUT: H-Output-2
**
*Node Output, nset=right
U1, U2
**
** HISTORY OUTPUT: H-Output-1
**
*Output, history, variable=PRESELECT
*End Step
